** ValveSpring FEA - Force vs Lift
** Material: VD SiCrNi SC  E=206000.0 MPa  nu=0.3
** Compression ramp 0 -> 20.0 mm  (1 mm increments)
**
*INCLUDE, INPUT=ValveSpring_mesh.inp
**
*NSET, NSET=NBOT
1, 2, 3, 9, 11, 12
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*NSET, NSET=NTOP
4, 5, 6, 405, 406, 787
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**
*MATERIAL, NAME=SPRING_STEEL
*ELASTIC
206000.0, 0.3
**
*SOLID SECTION, ELSET=EVOLUMES, MATERIAL=SPRING_STEEL
**
*STEP, NLGEOM, INC=200
*STATIC
1.0, 20.0, 0.1, 1.0
**
** Bottom face: fully fixed
*BOUNDARY
NBOT, 1, 3, 0.0
** Top face: X/Y fixed, Z compressed
NTOP, 1, 2, 0.0
NTOP, 3, 3, -20.0
**
*NODE PRINT, NSET=NBOT, TOTALS=YES, FREQUENCY=1
RF
*NODE FILE, FREQUENCY=5
U
*EL FILE, FREQUENCY=5
S
**
*END STEP
